# OpenSim document version 40000
Model BootBaan:
  gravity: 0 -9.90665 0
  ConsoleReporter__double_ reporter: report_time_interval=1 [s]
  Ground
  BodySet:
    Body Rowing_course: mass=1 [kg] mass_center=(0 0 0) inertia=(1 1 1 0 0 0)
      Brick Rowing_course_geom_1: half_lengths=(20 0.05 3.5)
    Body TheBoat: mass=10 inertia=(7.508333 7.508333 45 0 0 0)
      Brick TheBoat_geom_1: half_lengths=(3 0.1 0.3)
    Body Stretcher: mass=1 mass_center=(0 0 0) inertia=(0.01083333 0.01083333 0.045 0 0 0)
      Brick Stretcher_geom_1: half_lengths=(0.05 0.05 0.3)
    Body Seat: mass=1 mass_center=(0 0 0) inertia=(1 1 1 0 0 0)
      Brick Seat_geom_1: half_lengths=(0.05 0.05 0.3)
    Body Bow: mass=0.1 mass_center=(0 0 0) inertia=(1 1 1 0 0 0)
      Sphere Bow_geom_1: radius=0.05
    Body StarboardRigger: mass=1 mass_center=(0 0 0) inertia=(1 1 1 0 0 0)
      Cylinder StarboardRigger_geom_1: radius=0.02 half_height=0.3330165
    Body StarboardLock: mass=1 mass_center=(0 0 0) inertia=(1 1 1 0 0 0)
      Cylinder StarboardLock_geom_1: radius=0.01 half_height=0.025
    Body PortRigger: mass=1 mass_center=(0 0 0) inertia=(1 1 1 0 0 0)
      Cylinder PortRigger_geom_1: radius=0.02 half_height=0.3264966
    Body PortLock: mass=1 mass_center=(0 0 0) inertia=(1 1 1 0 0 0)
      Cylinder PortLock_geom_1: radius=0.01 half_height=0.025
    Body Lower_leg_lower: mass=4 mass_center=(0 0 0) inertia=(1 1 1 0 0 0)
      Cylinder Lower_leg_lower_geom_1: radius=0.05 half_height=0.12555
    Body Lower_leg_upper: mass=4 mass_center=(0 0 0) inertia=(1 1 1 0 0 0)
      Cylinder Lower_leg_upper_geom_1: radius=0.05 half_height=0.12555
    Body Upper_leg: mass=8 mass_center=(0 0 0) inertia=(1 1 1 0 0 0)
      Cylinder Upper_leg_geom_1: radius=0.05 half_height=0.2139
    Body Lower_back: mass=16 mass_center=(0 0 0) inertia=(1 1 1 0 0 0)
      Brick Lower_back_geom_1: half_lengths=(0.04 0.093 0.08)
    Body Upper_back: mass=16 mass_center=(0 0 0) inertia=(1 1 1 0 0 0)
      Brick Upper_back_geom_1: half_lengths=(0.05 0.2139 0.1)
    Body Shoulder: mass=8 mass_center=(0 0 0) inertia=(1 1 1 0 0 0)
      Brick Shoulder_geom_1: half_lengths=(0.0465 0.0465 0.2325)
    Body Head: mass=8 mass_center=(0 0 0) inertia=(1 1 1 0 0 0)
      Brick Head_geom_1: half_lengths=(0.04 0.1116 0.1116)
    Body Upper_Arm_Left: mass=4 mass_center=(0 0 0) inertia=(1 1 1 0 0 0)
      Brick Upper_Arm_Left_geom_1: half_lengths=(0.04 0.1395 0.04)
  JointSet:
    WeldJoint courseJoint: socket_parent_frame=ground_offset socket_child_frame=Rowing_course_offset
      PhysicalOffsetFrame ground_offset: socket_parent=/ground translation=(0 -0.05 0) [meters]
      PhysicalOffsetFrame Rowing_course_offset: socket_parent=/bodyset/Rowing_course translation=(0 0 0)
    CustomJoint boatJoint: socket_parent_frame=ground_offset socket_child_frame=TheBoat_offset
      Coordinate bJoint_3
      Coordinate bJoint_4
      PhysicalOffsetFrame ground_offset: socket_parent=/ground translation=(0 0.1 0)
      PhysicalOffsetFrame TheBoat_offset: socket_parent=/bodyset/TheBoat translation=(0 0 0)
      SpatialTransform:
        TransformAxis rotation1: axis=(1 0 0)
        TransformAxis rotation2: axis=(0 1 0)
        TransformAxis rotation3: axis=(0 0 1)
        TransformAxis translation1: coordinates=bJoint_3 axis=(1 0 0) LinearFunction(coefficients=1 0)
        TransformAxis translation2: coordinates=bJoint_4 axis=(0 1 0) LinearFunction(coefficients=1 0)
        TransformAxis translation3: axis=(0 0 1)
    WeldJoint stretcherJoint: socket_parent_frame=TheBoat_offset socket_child_frame=Stretcher_offset
      PhysicalOffsetFrame TheBoat_offset: socket_parent=/bodyset/TheBoat translation=(0 0.1 0)
      PhysicalOffsetFrame Stretcher_offset: socket_parent=/bodyset/Stretcher translation=(0 0 0)
    SliderJoint seatJoint: socket_parent_frame=TheBoat_offset socket_child_frame=Seat_offset
      Coordinate seatpos: default_value=-0.007375761 range=(-0.93 0)
      PhysicalOffsetFrame TheBoat_offset: socket_parent=/bodyset/TheBoat translation=(0.9270883 0.2 0)
      PhysicalOffsetFrame Seat_offset: socket_parent=/bodyset/Seat translation=(0 0 0)
    WeldJoint bowJoint: socket_parent_frame=TheBoat_offset socket_child_frame=Bow_offset
      PhysicalOffsetFrame TheBoat_offset: socket_parent=/bodyset/TheBoat translation=(3 0.1 0)
      PhysicalOffsetFrame Bow_offset: socket_parent=/bodyset/Bow translation=(0 0 0)
    WeldJoint starboardrigJoint: socket_parent_frame=TheBoat_offset socket_child_frame=StarboardRigger_offset
      PhysicalOffsetFrame TheBoat_offset: socket_parent=/bodyset/TheBoat translation=(0.45 0 0.3)
          orientation=(-2.292451 0 0) [radians]
      PhysicalOffsetFrame StarboardRigger_offset: socket_parent=/bodyset/StarboardRigger translation=(0 0.3330165 0)
    PinJoint starboardlockJoint: socket_parent_frame=StarboardRigger_offset socket_child_frame=StarboardLock_offset
      Coordinate slocangle: default_value=-0.3605327 range=(-1.570796 1.570796) clamped=true
      PhysicalOffsetFrame StarboardRigger_offset: socket_parent=/bodyset/StarboardRigger translation=(0 -0.3330165 0)
          orientation=(0.7216549 0 0)
      PhysicalOffsetFrame StarboardLock_offset: socket_parent=/bodyset/StarboardLock translation=(0 0.025 0)
          orientation=(1.570796 0 0)
    WeldJoint portrigJoint: socket_parent_frame=TheBoat_offset socket_child_frame=PortRigger_offset
      PhysicalOffsetFrame TheBoat_offset: socket_parent=/bodyset/TheBoat translation=(0.45 0 -0.3)
          orientation=(2.292451 0 0)
      PhysicalOffsetFrame PortRigger_offset: socket_parent=/bodyset/PortRigger translation=(0 0.3330165 0)
    PinJoint portlockJoint: socket_parent_frame=PortRigger_offset socket_child_frame=PortLock_offset
      Coordinate plocangle: default_value=-0.3605327 range=(-1.570796 1.570796) clamped=true
      PhysicalOffsetFrame PortRigger_offset: socket_parent=/bodyset/PortRigger translation=(0 -0.3330165 0)
          orientation=(-0.7216549 0 0)
      PhysicalOffsetFrame PortLock_offset: socket_parent=/bodyset/PortLock translation=(0 0.025 0)
          orientation=(-1.570796 0 0)
    PinJoint hipJoint: socket_parent_frame=Seat_offset socket_child_frame=Upper_leg_offset
      Coordinate hipangle: default_value=1.377065 range=(-0.3 1.770796) clamped=true
      PhysicalOffsetFrame Seat_offset: socket_parent=/bodyset/Seat translation=(0 0.05 0)
      PhysicalOffsetFrame Upper_leg_offset: socket_parent=/bodyset/Upper_leg translation=(0 -0.2139 0)
    PinJoint knee_Joint: socket_parent_frame=Upper_leg_offset socket_child_frame=Lower_leg_upper_offset
      Coordinate kneeangle: default_value=0.1745329 range=(0 3.141593) clamped=true
      PhysicalOffsetFrame Upper_leg_offset: socket_parent=/bodyset/Upper_leg translation=(0 0.2139 0)
      PhysicalOffsetFrame Lower_leg_upper_offset: socket_parent=/bodyset/Lower_leg_upper translation=(0 -0.12555 0)
    PinJoint foot_Joint: socket_parent_frame=Stretcher_offset socket_child_frame=Lower_leg_lower_offset
      Coordinate footangle: default_value=0.08726646 range=(0 1.570796) clamped=true
      PhysicalOffsetFrame Stretcher_offset: socket_parent=/bodyset/Stretcher translation=(0 0.05 0)
          orientation=(0 0 1.570796)
      PhysicalOffsetFrame Lower_leg_lower_offset: socket_parent=/bodyset/Lower_leg_lower translation=(0 0.12555 0)
    PinJoint lbackJoint: socket_parent_frame=Seat_offset socket_child_frame=Lower_back_offset
      Coordinate lbackangle: default_value=-0.7681194 range=(-1.570796 0.3) clamped=true
      PhysicalOffsetFrame Seat_offset: socket_parent=/bodyset/Seat translation=(0 0.05 0)
      PhysicalOffsetFrame Lower_back_offset: socket_parent=/bodyset/Lower_back translation=(0 -0.093 0)
    WeldJoint ubackJoint: socket_parent_frame=Lower_back_offset socket_child_frame=Upper_back_offset
      PhysicalOffsetFrame Lower_back_offset: socket_parent=/bodyset/Lower_back translation=(0 0.093 0)
          orientation=(0 0 0.3)
      PhysicalOffsetFrame Upper_back_offset: socket_parent=/bodyset/Upper_back translation=(0 -0.2139 0)
    WeldJoint shoulderJoint: socket_parent_frame=Upper_back_offset socket_child_frame=Shoulder_offset
      PhysicalOffsetFrame Upper_back_offset: socket_parent=/bodyset/Upper_back translation=(0 0.2139 0)
      PhysicalOffsetFrame Shoulder_offset: socket_parent=/bodyset/Shoulder translation=(0 -0.0465 0)
    WeldJoint headJoint: socket_parent_frame=Shoulder_offset socket_child_frame=Head_offset
      PhysicalOffsetFrame Shoulder_offset: socket_parent=/bodyset/Shoulder translation=(0 0.0465 0)
      PhysicalOffsetFrame Head_offset: socket_parent=/bodyset/Head translation=(0 -0.1116 0)
    BallJoint upper_arm_left_Joint: socket_parent_frame=Shoulder_offset socket_child_frame=Upper_Arm_Left_offset
      Coordinate uarmleft_out: default_value=-0.2490585
      Coordinate uarmleft_trn: default_value=-0.2806489
      Coordinate uarmleft_up: default_value=0.8011061
      PhysicalOffsetFrame Shoulder_offset: socket_parent=/bodyset/Shoulder translation=(0 0 0.2325)
          orientation=(0 0 1.570796)
      PhysicalOffsetFrame Upper_Arm_Left_offset: socket_parent=/bodyset/Upper_Arm_Left translation=(0 -0.1395 0)
  ConstraintSet:
    WeldConstraint legconstraint: socket_frame1=Lower_leg_lower_offset socket_frame2=Lower_leg_upper_offset
      PhysicalOffsetFrame Lower_leg_lower_offset: socket_parent=/bodyset/Lower_leg_lower translation=(0 -0.12555 0)
      PhysicalOffsetFrame Lower_leg_upper_offset: socket_parent=/bodyset/Lower_leg_upper translation=(0 0.12555 0)
  ForceSet:
    CoordinateActuator bJ_act_3: coordinate=bJoint_3
    CoordinateActuator bJ_act_4: coordinate=bJoint_4
    CoordinateActuator seatact: coordinate=seatpos
    CoordinateActuator slocact: coordinate=slocangle
    CoordinateActuator plocact: coordinate=plocangle
    CoordinateActuator hipact: coordinate=hipangle
    CoordinateActuator kneeact: coordinate=kneeangle
    CoordinateActuator footact: coordinate=footangle
    CoordinateActuator lbackact: coordinate=lbackangle
    CoordinateActuator ualo_act: coordinate=uarmleft_out
    CoordinateActuator ualt_act: coordinate=uarmleft_trn
    CoordinateActuator ualu_act: coordinate=uarmleft_up
    ElasticFoundationForce Boot: transition_velocity=0.02
      ContactParametersSet contact_parameters:
        ContactParameters: geometry=(boot baan) stiffness=1000000 dissipation=1 static_friction=0.001
            dynamic_friction=0.001 viscous_friction=0.001
  MarkerSet:
    Marker mBoat: TheBoat (0 0 0)
    Marker mSeat: Seat (0 0 0)
    Marker mShoulder: Shoulder (0 0 0)
    Marker msElbow: Upper_Arm_Left (0 0.1395 0)
  ContactGeometrySet:
    ContactHalfSpace baan: socket_frame=/ground location=(0 0 0) orientation=(0 0 -1.570796)
    ContactMesh boot: socket_frame=/bodyset/TheBoat location=(0 0 0) orientation=(-1.570796 0 0)
        filename=box6_0.6_0.2.stl
