# OpenSim document version 20302
CMC_TaskSet bootbaan_CMC:
  defaults: CMC_Joint default: weight=(1 1 1) wrt_body=-1 express_body=-1 active=(true false false) kp=(100 1 1)
      kv=(20 1 1) ka=(1 1 1) r0=(0 0 0) r1=(0 0 0) r2=(0 0 0) limit=0
  # Most use default values
  CMC_Joint bJoint_3: weight=(100 1 1) coordinate=bJoint_3
  CMC_Joint bJoint_4: weight=(1 1 1) coordinate=bJoint_4
  CMC_Joint seatpos: weight=(1000 1 1) coordinate=seatpos
  CMC_Joint hipangle: weight=(1000 1 1) coordinate=hipangle
  CMC_Joint kneeangle: weight=(1000 1 1) coordinate=kneeangle
  CMC_Joint footangle: weight=(1 1 1) coordinate=footangle
  CMC_Joint lbackangle: weight=(10000 1 1) coordinate=lbackangle
  CMC_Joint uarmleft_out: weight=(1000 1 1) coordinate=uarmleft_out
  CMC_Joint uarmleft_trn: weight=(1000 1 1) coordinate=uarmleft_trn
  CMC_Joint uarmleft_up: weight=(1000 1 1) coordinate=uarmleft_up
  CMC_Joint se_inout: weight=(1000 1 1) kp=(100 1 1) kv=(20 1 1) coordinate=se_inout
  CMC_Joint se_updown: weight=(1000 1 1) kp=(100 1 1) kv=(20 1 1) coordinate=se_inout coordinate=se_updown
  CMC_Joint uarmright_out: weight=(1000 1 1) coordinate=uarmright_out
  CMC_Joint uarmright_trn: weight=(1000 1 1) coordinate=uarmright_trn
  CMC_Joint uarmright_up: weight=(1000 1 1) coordinate=uarmright_up
  CMC_Joint pe_inout: weight=(1000 1 1) coordinate=pe_inout
  CMC_Joint pe_updown: weight=(1000 1 1) coordinate=pe_updown
