# OpenSim document version 30000
InverseKinematicsTool eerstetest:
  model_file: BootBaan.osim
  constraint_weight: 20
  accuracy: 1e-5
  marker_file: trajectory.trc
  time_range: 0.02 10
  output_motion_file: trajectory.mot
  report_marker_locations: true
  IKTaskSet bootbaan_IK:
    IKMarkerTask mBoat: weight=1
    IKMarkerTask mSeat: weight=1
    IKMarkerTask mShoulder: weight=2
    IKMarkerTask mpElbow: weight=1
    IKMarkerTask msElbow: weight=1
    IKMarkerTask mpHandle: weight=1
    IKMarkerTask msHandle: weight=1
    IKMarkerTask msBlade: weight=1
    IKMarkerTask mpBlade: weight=1
    IKCoordinateTask bJoint_3: weight=100000 value=0
    IKCoordinateTask bJoint_4: weight=100000 value=0
