# OpenSim document version 20302
CMC_TaskSet bootbaan_CMC:
  defaults: CMC_Joint default: on=false weight=(1 1 1) wrt_body=-1 express_body=-1 active=(true false false)
      kp=(100 1 1) kv=(20 1 1) ka=(1 1 1) r0=(0 0 0) r1=(0 0 0) r2=(0 0 0) limit=0
  CMC_Joint hipangle: weight=(1000 1 1) coordinate=hipangle
  # lbackangle in both arm-kinematic loops
  CMC_Joint lbackangle: weight=(10000 1 1) coordinate=lbackangle
  # Kinematic loop in the left arm:
  CMC_Joint handleleft_out: weight=(1 1 1) coordinate=handleleft_out
  CMC_Joint handleleft_trn: weight=(1 1 1) coordinate=handleleft_trn
  CMC_Joint handleleft_up: weight=(1 1 1) coordinate=handleleft_up
  # Kinematic loop in the right arm:
