# OpenSim document version 40000
Model Pusher:
  gravity: 0 -9.90665 0
  ConsoleReporter__double_ reporter: report_time_interval=1 [s]
  Ground
  BodySet:
    Body The_rowing_course: mass=1 [kg] mass_center=(0 0 0) inertia=(1 1 1 0 0 0)
      Brick The_rowing_course_geom_1: half_lengths=(20 0.05 3.5)
    Body TheBoat: mass=50 inertia=(7 7 45 0 0 0)
      Brick TheBoat_geom_1: half_lengths=(3 0.1 0.3)
    Body The_upper_leg: mass=1 mass_center=(0 0 0) inertia=(1 1 1 0 0 0)
      Cylinder The_upper_leg_geom_1: radius=0.1 half_height=1
    Body The_lower_leg: mass=1 mass_center=(0 0 0) inertia=(1 1 1 0 0 0)
      Cylinder The_lower_leg_geom_1: radius=0.1 half_height=1.5
    Body TheBlade: mass=5 inertia=(1 1 1 0 0 0)
      Brick TheBlade_geom_1: half_lengths=(0.025 0.3 0.3)
  JointSet:
    WeldJoint courseJoint: socket_parent_frame=ground_offset socket_child_frame=The_rowing_course_offset
      PhysicalOffsetFrame ground_offset: socket_parent=/ground translation=(0 0.05 0) [meters]
      PhysicalOffsetFrame The_rowing_course_offset: socket_parent=/bodyset/The_rowing_course translation=(0 0 0)
    FreeJoint boatJoint: socket_parent_frame=The_rowing_course_offset socket_child_frame=TheBoat_offset
      Coordinate boatJoint_coord_0: clamped=true
      Coordinate boatJoint_coord_1: clamped=true
      Coordinate boatJoint_coord_2: clamped=true
      Coordinate boatJoint_coord_3: clamped=true
      Coordinate boatJoint_coord_4: clamped=true
      Coordinate boatJoint_coord_5: clamped=true
      PhysicalOffsetFrame The_rowing_course_offset: socket_parent=/bodyset/The_rowing_course translation=(0 0.2 0)
      PhysicalOffsetFrame TheBoat_offset: socket_parent=/bodyset/TheBoat translation=(0 0 0)
    PinJoint baseJoint: socket_parent_frame=TheBoat_offset socket_child_frame=The_upper_leg_offset
      Coordinate baseangle: range=(-1.4 1)
      PhysicalOffsetFrame TheBoat_offset: socket_parent=/bodyset/TheBoat translation=(2 0.1 0)
      PhysicalOffsetFrame The_upper_leg_offset: socket_parent=/bodyset/The_upper_leg translation=(0 -1 0)
    PinJoint lowerJoint: socket_parent_frame=The_upper_leg_offset socket_child_frame=The_lower_leg_offset
      Coordinate kneeangle: range=(-1.2 1.570796)
      PhysicalOffsetFrame The_upper_leg_offset: socket_parent=/bodyset/The_upper_leg translation=(0 1 0)
      PhysicalOffsetFrame The_lower_leg_offset: socket_parent=/bodyset/The_lower_leg translation=(0 -1.5 0)
          orientation=(0 0 1.570796) [radians]
    PinJoint bladeJoint: socket_parent_frame=The_lower_leg_offset socket_child_frame=TheBlade_offset
      Coordinate bladeangle: range=(0 1.570796)
      PhysicalOffsetFrame The_lower_leg_offset: socket_parent=/bodyset/The_lower_leg translation=(0 1.5 0)
      PhysicalOffsetFrame TheBlade_offset: socket_parent=/bodyset/TheBlade translation=(0 0 0)
  ControllerSet:
    PrescribedController: actuator_list=(baseangle kneeangle bladeangle)
      FunctionSet ControlFunctions: Constant(value=0) Constant(value=0) Constant(value=0)
  ForceSet:
    CoordinateActuator baseangle: coordinate=baseangle
    CoordinateActuator kneeangle: coordinate=kneeangle
    CoordinateActuator bladeangle: coordinate=bladeangle
    ElasticFoundationForce Course: transition_velocity=0.02
      ContactParametersSet contact_parameters:
        ContactParameters: geometry=(bootje baantje) stiffness=1000000 dissipation=1 static_friction=0.001
            dynamic_friction=0.001 viscous_friction=0.001
    ElasticFoundationForce Blad: transition_velocity=0.1
      ContactParametersSet contact_parameters:
        ContactParameters: geometry=(bladje baantje) stiffness=50000 dissipation=3 static_friction=1 dynamic_friction=1
            viscous_friction=0.84
  MarkerSet:
    Marker mbasej: TheBoat (5 0.3 0)
    Marker mbladej: The_lower_leg (0 1.5 0)
    Marker mend: TheBlade (0 0.6 0)
  ContactGeometrySet:
    ContactMesh baantje: socket_frame=/bodyset/The_rowing_course location=(0 0 0) orientation=(1.570796 0 0)
        filename=box40_7_0.1_weinig.stl
    ContactMesh bootje: socket_frame=/bodyset/TheBoat location=(0 0 0) orientation=(1.570796 0 0)
        filename=box6_0.6_0.2.stl
    ContactMesh bladje: socket_frame=/bodyset/TheBlade location=(0 0 0) orientation=(0 -1.570796 0)
        filename=box0.05_0.45_0.45.stl
