# OpenSim document version 30000
InverseKinematicsTool eerstetest:
  model_file: Pusher.osim
  accuracy: 1e-5
  marker_file: trajectory.trc
  time_range: 0 20
  output_motion_file: trajectory.mot
  report_marker_locations: true
  IKTaskSet push_IK:
    IKMarkerTask mbladej: weight=1
    IKMarkerTask mend: weight=1
    IKCoordinateTask bJoint_1: weight=100000 value=0
    IKCoordinateTask bJoint_3: weight=100000 value=0
    IKCoordinateTask bJoint_4: weight=100000 value=0
    IKCoordinateTask bJoint_3: weight=100000 value=0
    IKCoordinateTask bJoint_4: weight=100000 value=0
